folder simulations: version=36; creator=Apsim 7.8-r3867
  simulation Kongwa_CHIRPS_nov
    metfile met: filename=Kongwa_CHIRPS.met
    clock
      start_date = 01/01/1981  # Enter the start date of the simulation
      end_date = 31/12/2020  # Enter the end date of the simulation
    summaryfile
    area paddock
      Soil EmbuARS_Avg: SoilType=USDA - Typic Palehumult (Vey fine clayey) FAO Humic nitisol; Site=EMBU Agricultural Research Station; Region=Embu district (UM2); Country=Kenya; Latitude=0; Longitude=0; YearOfSampling=0
        DataSource=Fertilizer use recommendation project (phase 1). Final reprot Annex III Vol 24 Embu district, June 1987
        InitialWater: FractionFull=0.5; PercentMethod=EvenlyDistributed; RelativeTo=ll15
        Water
          Thickness  BD    AirDry  LL15   DUL    SAT
          150        0.99  0.107   0.134  0.24   0.541
          250        0.97  0.113   0.165  0.25   0.457
          300        0.97  0.133   0.17   0.25   0.457
          320        0.97  0.143   0.234  0.295  0.457
          480        0.97  0.163   0.234  0.322  0.457
          500        0.97  0.203   0.234  0.322  0.457
          SoilCrop maize: LL=[0.134, 0.165, 0.17, 0.234, 0.234, 0.234]; KL=[0.12, 0.12, 0.1, 0.08, 0.07, 0.05]; XF=[1, 1, 1, 1, 0, 0]
        SoilWater: SummerCona=3; SummerU=5; SummerDate=1-nov; WinterCona=3; WinterU=5; WinterDate=1-apr; DiffusConst=88; DiffusSlope=35; Salb=0.13; CN2Bare=85; CNRed=20; CNCov=0.8; Slope=5; Thickness=[150, 250, 300, 320, 480, 500]; SWCON=[0.7, 0.7, 0.7, 0.7, 0.7, 0.7]
        SoilOrganicMatter: RootCN=40; RootWt=500; SoilCN=12; EnrACoeff=7.4; EnrBCoeff=0.2; OCUnits=WalkleyBlack
          Thickness  OC    FBiom  FInert
          150        1.35  0.02   0.35
          250        0.75  0.015  0.6
          300        0.45  0.01   0.8
          320        0.35  0.01   0.9
          480        0.17  0.01   0.95
          500        0.07  0.01   0.99
        Analysis: PHUnits=Water; BoronUnits=HotWater
          Thickness  Texture  MunsellColour  PH   CEC   Ca   Mg   Na    K     ParticleSizeSand  ParticleSizeSilt  ParticleSizeClay
          150        999999   999999         5.8  12    5.4  3.1  0.06  1.26  20                24                56
          250        999999   999999         6.1  10.6  4.8  3    0.06  0.72  16                10                74
          300        999999   999999         6.1  10.6  4.8  3    0.06  0.72  14                12                74
          320        999999   999999         6.2  10.6  4.8  3    0.06  0.72  10                14                76
          480        999999   999999         6.2  10.6  4.8  3    0.06  0.72  10                12                78
          500        999999   999999         5.9  10.6  4.8  3    0.06  0.72  18                20                62
        Sample Initial nitrogen: NO3Units=kgha; NH4Units=kgha; SWUnits=Volumetric; OCUnits=Total; PHUnits=Water
          Thickness  NO3       NH4
          150        0.152856  0.0764282
          250        0.249614  0.124807
          300        0.299537  0.149768
          320        0.319506  0.159753
          480        0.479259  0.239629
          500        0.499228  0.249614
      surfaceom SurfaceOrganicMatter
        PoolName = wheat  # Organic Matter pool name
        type = wheat  # Organic Matter type
        mass = 0  # Initial surface residue (kg/ha)
        cnr = 80.0  # C:N ratio of initial residue
        standing_fraction = 0.0  # Fraction of residue standing
      fertiliser
      maize
      folder Manager folder
        manager Sowing rule
          # Sowing criteria
          date1 = 1-nov  # Enter sowing window START date (dd-mmm)
          date2 = 30-nov  # Enter sowing window END date (dd-mmm)
          must_sow = yes  # Must sow?
          raincrit = 20  # Amount of rainfall
          rainnumdays = 3  # Number of days of rainfall
          esw_amount = 10  # Enter minimum allowable available soil water (mm)
          # Sowing parameters
          crop = maize  # Enter name of crop to sow
          density = 3  # Enter sowing density (plants/m2)
          depth = 30  # Enter sowing depth (mm)
          cultivar = sc401  # Enter cultivar
          class = plant  # Enter crop growth class
          row_spacing = 900  # Enter row spacing (mm)
          on start_of_day:
```
      if (paddock_is_fallow() = 1 and FallowIn <> 'yes' and (NextCrop = 0 or NextCrop = '[crop]')) then
         if (date_within('[date1], [date2]') = 1) then
            if (rain[[rainnumdays]] >= [raincrit] AND esw >= [esw_amount]) OR
                ('[must_sow]' = 'yes' AND today = date('[date2]'))) THEN
               ChooseNextCrop = 'yes'   ! for rotations
               [crop] sow plants =[density], sowing_depth = [depth], cultivar = [cultivar], row_spacing = [row_spacing], crop_class = [class]
            endif
            if today = date('[date2]') then
               ChooseNextCrop = 'yes'
            endif
         endif
      endif
```
        manager Output at harvesting
          # Output criteria
          crop = maize  # Enter name of crop to output at harvest
          outputfile = outputfile  # Name of outputfile component
          on end_of_day:
```
         if ([crop]_to_harvest = 1) then
            '[outputfile]' do_output
         endif
```
        manager Harvesting rule
          # Harvesting criteria
          crop = maize  # Enter name of crop to harvest when ripe
          fraction_to_remove = 0.9  # Enter fraction of stover to remove
          on init:
```
          [crop]_to_harvest = 0
```
          on end_of_day:
```
         if ([crop]_to_harvest = 1) then
            [crop] harvest remove=[fraction_to_remove]
            [crop] kill_crop
            [crop] end_crop
                  crop_in = crop_in - 1
            [crop]_to_harvest = 0
            fert_tot = 0
            sow_year = 0
            if (crop_current = '[crop]') then
               crop_current = crop_current1
               crop_current1 = crop_current2
               crop_current2 = blank
            elseif (crop_current1 = '[crop]') then
               crop_current1 = crop_current2
               crop_current2 = blank
            elseif (crop_current2 = '[crop]') then
               crop_current2 = blank
            endif
         endif

         if ([crop].StageName = 'harvest_ripe' OR [crop].plant_status = 'dead') then
            [crop]_to_harvest = 1
         endif
```
        manager Remove all residues on a fixed date
          # Removal criteria
          date = 1-aug  # Date to remove residues (dd-mmm)
          surfaceommodule = SurfaceOrganicMatter  # Name of your surface organic matter module
          on start_of_day:
```
         if today = date('[date]') then
            '[surfaceommodule]' tillage type = user_defined, f_incorp = 1.0 (), tillage_depth = 0.0 ()
         endif
```
        manager Fertilise at sowing
          # When should fertiliser be applied
          modulename = maize  # On which module should the event come from
          eventname = sowing  # On which event should fertiliser be applied
          # Fertiliser application details
          fertmodule = fertiliser  # Module used to apply the fertiliser
          fert_amount_sow = 0  # Amount of starter fertiliser at sowing (kg/ha)
          fert_type_sow = urea_N  # Sowing fertiliser type
          on [modulename].[eventname]:
```
        [fertmodule] apply amount = [fert_amount_sow] (kg/ha), depth = 50 (mm), type = [fert_type_sow]
```
        manager Fertilise on days after sowing - top up
          # When should fertiliser be applied
          modulename = maize  # On which crop is fertiliser being applied
          fert_das = 30  # Enter fertiliser days after sowing
          fert_criteria = 0  # Amount of N top dress
          # Fertiliser application details
          fertmodule = Fertiliser  # Module used to apply the fertiliser
          fert_type = urea_N  # Fertiliser type
          on start_of_day:
```
         if ([modulename].DaysAfterSowing = [fert_das]) then
            N_deficit = [fert_criteria]
            '[fertmodule]' apply amount = N_deficit (kg/ha), depth = 50 (mm), type = [fert_type] ()
         endif
```
      outputfile: filename=Kongwa_CHIRPS_nov.out; title=Kongwa_CHIRPS_nov; events=My Variables Events
        variables My Variables
          variables: dd/mm/yyyy as Date, esw, day, year, yield, stover, biomass
  factorial Factorials: active=0
    settings
    factor sowing density
      targets
        Target=[/simulations/Embu_LR1_CHIRPS/paddock/Manager folder/Sowing rule LR, /simulations/Kongwa_CHIRPS/paddock/Manager folder/Sowing rule LR, /simulations/Kongwa_CHIRPS_nov/paddock/Manager folder/Sowing rule]
      vars: density=3,4
      manager Sowing rule
        # Sowing criteria
        date1 = 24-mar  # Enter sowing window START date (dd-mmm)
        date2 = 8-apr  # Enter sowing window END date (dd-mmm)
        must_sow = yes  # Must sow?
        raincrit = 20  # Amount of rainfall
        rainnumdays = 3  # Number of days of rainfall
        esw_amount = 10  # Enter minimum allowable available soil water (mm)
        # Sowing parameters
        crop = maize  # Enter name of crop to sow
        density = 3  # Enter sowing density (plants/m2)
        depth = 30  # Enter sowing depth (mm)
        cultivar = sc401  # Enter cultivar
        class = plant  # Enter crop growth class
        row_spacing = 900  # Enter row spacing (mm)
        on start_of_day:
        script: same as in Kongwa_CHIRPS_nov.paddock.Manager folder.Sowing rule
    factor fert_amount_sow
      targets
        Target=[/simulations/Embu_LR2_CPC/paddock/Manager folder/Fertilise at sowing, /simulations/Kongwa_CHIRPS_nov/paddock/Manager folder/Fertilise at sowing]
      vars: fert_amount_sow=0,40,60,80
      manager Fertilise at sowing: same as Kongwa_CHIRPS_nov.paddock.Manager folder.Fertilise at sowing
  simulation Kongwa_CHIRPS_dec
    metfile met: filename=Kongwa_CHIRPS.met
    clock
      start_date = 01/01/1981  # Enter the start date of the simulation
      end_date = 31/12/2020  # Enter the end date of the simulation
    summaryfile
    area paddock
      Soil EmbuARS_Avg: same as Kongwa_CHIRPS_nov.paddock.EmbuARS_Avg
      surfaceom SurfaceOrganicMatter
        PoolName = wheat  # Organic Matter pool name
        type = wheat  # Organic Matter type
        mass = 0  # Initial surface residue (kg/ha)
        cnr = 80.0  # C:N ratio of initial residue
        standing_fraction = 0.0  # Fraction of residue standing
      fertiliser
      maize
      folder Manager folder
        manager Sowing rule
          # Sowing criteria
          date1 = 1-dec  # Enter sowing window START date (dd-mmm)
          date2 = 31-dec  # Enter sowing window END date (dd-mmm)
          must_sow = yes  # Must sow?
          raincrit = 20  # Amount of rainfall
          rainnumdays = 3  # Number of days of rainfall
          esw_amount = 10  # Enter minimum allowable available soil water (mm)
          # Sowing parameters
          crop = maize  # Enter name of crop to sow
          density = 3  # Enter sowing density (plants/m2)
          depth = 30  # Enter sowing depth (mm)
          cultivar = sc401  # Enter cultivar
          class = plant  # Enter crop growth class
          row_spacing = 900  # Enter row spacing (mm)
          on start_of_day:
          script: same as in Kongwa_CHIRPS_nov.paddock.Manager folder.Sowing rule
        manager Output at harvesting
          # Output criteria
          crop = maize  # Enter name of crop to output at harvest
          outputfile = outputfile  # Name of outputfile component
          on end_of_day:
```
         if ([crop]_to_harvest = 1) then
            '[outputfile]' do_output
         endif
```
        manager Harvesting rule: same as Kongwa_CHIRPS_nov.paddock.Manager folder.Harvesting rule
        manager Remove all residues on a fixed date: same as Kongwa_CHIRPS_nov.paddock.Manager folder.Remove all residues on a fixed date
        manager Fertilise at sowing: same as Kongwa_CHIRPS_nov.paddock.Manager folder.Fertilise at sowing
        manager Fertilise on days after sowing - top up: same as Kongwa_CHIRPS_nov.paddock.Manager folder.Fertilise on days after sowing - top up
      outputfile: filename=Kongwa_CHIRPS_dec.out; title=Kongwa_CHIRPS_dec; events=My Variables Events
        variables My Variables
          variables: dd/mm/yyyy as Date, esw, day, year, yield, stover, biomass
  simulation Kongwa_CHIRPS_jan
    metfile met: filename=Kongwa_CHIRPS.met
    clock
      start_date = 01/01/1981  # Enter the start date of the simulation
      end_date = 31/12/2020  # Enter the end date of the simulation
    summaryfile
    area paddock
      Soil EmbuARS_Avg: same as Kongwa_CHIRPS_nov.paddock.EmbuARS_Avg
      surfaceom SurfaceOrganicMatter
        PoolName = wheat  # Organic Matter pool name
        type = wheat  # Organic Matter type
        mass = 0  # Initial surface residue (kg/ha)
        cnr = 80.0  # C:N ratio of initial residue
        standing_fraction = 0.0  # Fraction of residue standing
      fertiliser
      maize
      folder Manager folder
        manager Sowing rule
          # Sowing criteria
          date1 = 1-jan  # Enter sowing window START date (dd-mmm)
          date2 = 31-jan  # Enter sowing window END date (dd-mmm)
          must_sow = yes  # Must sow?
          raincrit = 20  # Amount of rainfall
          rainnumdays = 3  # Number of days of rainfall
          esw_amount = 10  # Enter minimum allowable available soil water (mm)
          # Sowing parameters
          crop = maize  # Enter name of crop to sow
          density = 3  # Enter sowing density (plants/m2)
          depth = 30  # Enter sowing depth (mm)
          cultivar = sc401  # Enter cultivar
          class = plant  # Enter crop growth class
          row_spacing = 900  # Enter row spacing (mm)
          on start_of_day:
          script: same as in Kongwa_CHIRPS_nov.paddock.Manager folder.Sowing rule
        manager Output at harvesting
          # Output criteria
          crop = maize  # Enter name of crop to output at harvest
          outputfile = outputfile  # Name of outputfile component
          on end_of_day:
```
         if ([crop]_to_harvest = 1) then
            '[outputfile]' do_output
         endif
```
        manager Harvesting rule: same as Kongwa_CHIRPS_nov.paddock.Manager folder.Harvesting rule
        manager Remove all residues on a fixed date: same as Kongwa_CHIRPS_nov.paddock.Manager folder.Remove all residues on a fixed date
        manager Fertilise at sowing: same as Kongwa_CHIRPS_nov.paddock.Manager folder.Fertilise at sowing
        manager Fertilise on days after sowing - top up: same as Kongwa_CHIRPS_nov.paddock.Manager folder.Fertilise on days after sowing - top up
      outputfile: filename=Kongwa_CHIRPS_jan.out; title=Kongwa_CHIRPS_jan; events=My Variables Events
        variables My Variables
          variables: dd/mm/yyyy as Date, esw, day, year, yield, stover, biomass
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